# Buck计算书
# 一、单位
k_1 := 10^3
m_1 := 10^-3
μ_1 := 10^-6
n_1 := 10^-9
p_1 := 10^-12
M_1 := 10^6
j := sqrt(-1)
# 二、规格
V_in := 12
V_omin := 1
V_omax := 10
I_omax := 3
ΔV_o_pkpk := 20*m_1 = 0.02
f_smin := 100*k_1
f_smax := 200*k_1
ΔV_in_pkpk := 200*m_1
# 三、器件选型
D_0min := V_omin/V_in = 0.0833333
D_0max := V_omax/V_in = 0.833333
# 3.1输入电容
C_in1 := 0.5*(1 - 0.5)*I_omax/(ΔV_in_pkpk*f_smin) = 3.75e-5
C_in := C_in1*2 = 7.5e-5
i_cin_rms := I_omax*sqrt(0.5*(1 - 0.5)) = 1.5
1.5/0.7 = 2.14286
C_in := 330*μ_1*3 = 0.00099
0.76*3 = 2.28  # 纹波电流rms
# 容值>75uF,纹波电流>2.1A;选择330uFX3，纹波电流2.3A
ESR := 0.086
ΔV_in_pkpk_real := i_cin_rms/3*ESR = 0.043
# 3.2 buck电感
ΔI_L_pkpk := 0.3*I_omax = 0.9
L_1 := V_omax*D_0max/(ΔI_L_pkpk*f_smin) = 9.25926e-5
I_Lmax := I_omax + 1/2*ΔI_L_pkpk = 3.45
I_Lmax/0.7 = 4.92857
# 100uH,5A电感
# 3.3 MOS管
V_ds1 := V_in/0.5 = 24
V_ds2 := V_in/0.5 = 24
I_Q1 := I_Lmax/0.7 = 4.92857
I_Q2 := I_Lmax/0.7 = 4.92857
R_on := 30*m_1
P_cond1 := I_omax^2*D_0max*R_on = 0.225
P_cond2 := I_omax^2*(1 - D_0min)*R_on = 0.2475
Q_g := 22*n_1
I_g := 2
Δt_sw := Q_g/I_g = 1.1e-8
P_sw1_p1 := 2*1/2*V_in*I_omax*Δt_sw*f_smax = 0.0792
P_sw2_p1 := 2*1/2*V_in*I_omax*Δt_sw*f_smax = 0.0792
P_mos1 := P_cond1 + P_sw1_p1 = 0.3042
P_mos2 := P_cond2 + P_sw2_p1 = 0.3267
# 3.4 输出电容
C_out := ΔI_L_pkpk/(8*ΔV_o_pkpk*f_smin) = 5.625e-5
C_out := 2*C_out = 0.0001125
I_cout_rms := ΔI_L_pkpk/(2*sqrt(3)) = 0.259808
I_cout_rms/0.5 = 0.519615
# 3.5 电感电流采样
R_iLsen := 0.03
I_Lmax^2*R_iLsen = 0.357075
I_Lmax*R_iLsen = 0.1035
3/(I_Lmax*R_iLsen) = 28.9855
I_Lmax*R_iLsen*30 = 3.105
# 3.6 输入电流采样
R_iLsen*D_0max*I_omax = 0.075
3/(R_iLsen*D_0max*I_omax) = 40
# 3.6 驱动
# 3.6.1 充电二极管
V_rrm := 1.5*V_in = 18
I_avg := 1
# 3.6.2 自举电容
# 3.7 12V转3.3V
# 3.7.1 电感评估
V_out := 3.3
L_2 := 4.7*μ_1 = 4.7e-6
f_sw := 2.5*M_1 = 2500000
ΔI_Lmax := V_out*((1 - V_out/V_in)/(L_2*f_sw)) = 0.203617
I_Lmax := 3 + ΔI_Lmax/2 = 3.10181
